# OpenSim document version 30517
AnalyzeTool FMS:
  model_file: ../models/Full_Body_Exercise_Synth_Model.osim
  replace_force_set: false
  results_directory: /mnt/externe_festplatte/synthesization/synth_loso_112/Analysis/90/9/
  output_precision: 8
  initial_time: 0
  final_time: 1000
  solve_for_equilibrium_for_auxiliary_states: false
  maximum_number_of_integrator_steps: 20000
  maximum_integrator_step_size: 1
  minimum_integrator_step_size: 1e-8
  integrator_error_tolerance: 1e-5
  coordinates_file: /home/andreasspilz/big_storage/synthesization/approach11/synth_loso_90/IKResults/1423/9/ik_1423_full_body_model_data.mot
  lowpass_cutoff_frequency_for_coordinates: -1
  AnalysisSet Analyses:
    BodyKinematics: start_time=0 end_time=1000 step_interval=1 in_degrees=true bodies=all
        express_results_in_body_local_frame=false
