# OpenSim document version 40500
ScaleTool Unrestricted_Full_Body_Model-scaled:
  mass: 90 [kg]
  height: -1
  age: -1
  ModelScaler:
    apply: true
    scaling_order: measurements
    marker_file: opensim_data_Dynamic OKI 1.trc
    time_range: 0 0.1
    preserve_mass_distribution: true
    MeasurementSet:
      Measurement pelvis: apply=true
        MarkerPair: markers=(R_IAS L_IAS)
        BodyScale pelvis: axes=(X Y Z)
      Measurement femur_r: apply=true
        MarkerPair: markers=(R_IAS R_FLE)
        BodyScale femur_r: axes=(X Y Z)
      Measurement femur_l: apply=true
        MarkerPair: markers=(L_IAS L_FLE)
        BodyScale femur_l: axes=(X Y Z)
      Measurement tibia_r: apply=true
        MarkerPair: markers=(R_FAX R_FAL)
        BodyScale tibia_r: axes=(X Y Z)
      Measurement tibia_l: apply=true
        MarkerPair: markers=(L_FAX L_FAL)
        BodyScale tibia_l: axes=(X Y Z)
      Measurement torso: apply=true
        MarkerPair: markers=(R_SAE R_IAS)
        MarkerPair: markers=(L_SAE L_IAS)
        BodyScale torso: axes=(X Y Z)
      Measurement humerus_r: apply=true
        MarkerPair: markers=(R_SAE R_HLE)
        BodyScale humerus_r: axes=(X Y Z)
      Measurement humerus_l: apply=true
        MarkerPair: markers=(L_SAE L_HLE)
        BodyScale humerus_l: axes=(X Y Z)
      Measurement radius_r: apply=true
        MarkerPair: markers=(R_HLE R_RSP)
        BodyScale radius_r: axes=(X Y Z)
      Measurement radius_l: apply=true
        MarkerPair: markers=(L_HLE L_RSP)
        BodyScale radius_l: axes=(X Y Z)
      Measurement ulna_r: apply=true
        MarkerPair: markers=(R_HLE R_RSP)
        BodyScale ulna_r: axes=(X Y Z)
      Measurement ulna_l: apply=true
        MarkerPair: markers=(L_HLE L_RSP)
        BodyScale ulna_l: axes=(X Y Z)
  MarkerPlacer:
    apply: true
    marker_file: opensim_data_Dynamic OKI 1.trc
    time_range: 0 0.1
    output_motion_file: motion_marker_placer.mot
    output_marker_file: output_marker_file
    max_marker_movement: -1
    IKTaskSet:
      IKMarkerTask R_SAE: apply=true weight=1
      IKMarkerTask L_SAE: apply=true weight=1
      IKMarkerTask R_HEAD: apply=true weight=1
      IKMarkerTask L_HEAD: apply=true weight=1
      IKMarkerTask R_HLE: apply=true weight=1
      IKMarkerTask R_RSP: apply=true weight=1
      IKMarkerTask R_USP: apply=true weight=1
      IKMarkerTask L_HLE: apply=true weight=1
      IKMarkerTask L_RSP: apply=true weight=1
      IKMarkerTask L_USP: apply=true weight=1
      IKMarkerTask R_IAS: apply=true weight=1
      IKMarkerTask L_IAS: apply=true weight=1
      IKMarkerTask R_FLE: apply=true weight=1
      IKMarkerTask R_TTC: apply=true weight=0.2
      IKMarkerTask R_FAL: apply=true weight=1
      IKMarkerTask R_FCC: apply=true weight=1
      IKMarkerTask L_FLE: apply=true weight=1
      IKMarkerTask L_TTC: apply=true weight=0.2
      IKMarkerTask L_FAL: apply=true weight=1
      IKMarkerTask L_FCC: apply=true weight=1
      IKMarkerTask SGL: apply=true weight=1
      IKMarkerTask R_FTC: apply=true weight=0.2
      IKMarkerTask L_FTC: apply=true weight=0.2
      IKMarkerTask SJN: apply=true weight=0.2
      IKMarkerTask MAI: apply=true weight=1
      IKMarkerTask R_IPS: apply=true weight=1
      IKMarkerTask L_IPS: apply=true weight=1
      IKMarkerTask R_HUM: apply=true weight=0.2
      IKMarkerTask L_HUM: apply=true weight=0.2
      IKMarkerTask L_FME: apply=true weight=1
      IKMarkerTask R_FME: apply=true weight=1
      IKMarkerTask R_TAM: apply=true weight=1
      IKMarkerTask L_TAM: apply=true weight=1
      IKMarkerTask R_FAX: apply=true weight=1
      IKMarkerTask L_FAX: apply=true weight=1
      IKMarkerTask R_FOOT1: apply=true weight=1
      IKMarkerTask R_FOOT2: apply=true weight=1
      IKMarkerTask L_FOOT1: apply=true weight=1
      IKMarkerTask L_FOOT2: apply=true weight=1
